// COMSOL Multiphysics 5.2.0.220 model "test0.mph"
// Outline of the model tree

Geometry
  geom1 "Geometry 1" (1D, length unit m)
    i1: Interval | p = 0, 1
    fin: Finalize "Form Union"

Materials
  mat1: Common "Material 1" on all domains
    Crystallization "Crystallization Kinetics"
      Knak = 0.5
      n_avrami = 3

Physics
  ck: CrystallizationKinetics on all domains
    dependent variable alpha
    ck1: CrystallisationKinetics (default)
    init1: init "Initial Values 1" (default) | alpha = 0

Mesh
  mesh1 "Mesh 1" (physics-controlled)
    size: MeshSizeDefault | hauto = 5

Studies
  std1 "Study 1"
    time: Transient "Time Dependent" | tlist = range(0,0.2,8); rtol = 0.00001

Solver configurations
  sol1 "Solution 1" (study std1)
    v1: Variables "Dependent Variables 1"
    t1: Time "Time-Dependent Solver 1"
      tlist = range(0,0.2,8)
      rtol = 0.00001
      atolglobalmethod = scaled
      atolglobal = 0.001
      maxorder = 2
      minorder = 1
      estrat = exclude
      rhoinf = 0.75
      fc1: FullyCoupled
        linsolver = d1
        dtech = hnlin
        initstep = 1
        minstep = 1.0E-4
        rstep = 10
        useminsteprecovery = auto
        minsteprecovery = 0.75
        ntermauto = tol
        maxiter = 5
        ntolfact = 1
        niter = 1
        damp = 1
        jtech = minimal
        ntermconst = tol
        initsteph = 1.0E-4
        minsteph = 1.0E-8
      d1: Direct | linsolver = mumps; mumpsalloc = 1.2; errorchk = auto; rhob = 400

Datasets
  dset1: Solution | solution = sol1

Plots
  pg1: PlotGroup1D "Crystallization (ck)" | data = dset1
    lngr1: LineGraph on domains 1 | expr = alpha
  pg2: PlotGroup1D "versus time" | data = dset1
    ptgr1: PointGraph on boundaries 1 | expr = alpha