// COMSOL Multiphysics 5.2.0.220 model "testKS.mph"
// Outline of the model tree

Functions
  int1: Interpolation | funcname = cycle; table = {{0, 20}, {30, 180}, {180, 180}, {210, 20}}; argunit = min; fununit = degC

Geometry
  geom1 "Geometry 1" (1D, length unit m)
    i1: Interval | p2 = 1[cm]; p = {0, 1[cm]}
    fin: Finalize "Form Union"

Materials
  mat2: Common "Material 2" on domains 1
    def "Basic"
      thermalconductivity = 0.6
      density = 1000
      heatcapacity = 1000
    Cure "Cure Kinetics"
      k1 = 0.1
      k2 = 1
      n = 0.75
      m = 1.25

Physics
  ck: CureKinetics on all domains
    dependent variable alpha
    ck1: CureKinetics "Kamal Sourour Cure Kinetics 1" (default) | k1_mat = from_mat; n_mat = from_mat; k2_mat = from_mat
    init1: init "Initial Values 1" (default)
  ht: HeatTransfer "Heat Transfer in Solids" on all domains
    dependent variable T
    solid1: SolidHeatTransferModel "Heat Transfer in Solids 1" (default)
    init1: init "Initial Values 1" (default)
    ins1: ThermalInsulation (default)
    temp1: TemperatureBoundary "Temperature 1" on boundaries 2 | T0 = cycle(t)

Mesh
  mesh1 "Mesh 1" (physics-controlled)
    size: MeshSizeDefault | hauto = 5

Studies
  std1 "Study 1"
    time: Transient "Time Dependent" | tlist = range(0,1,30)

Solver configurations
  sol1 "Solution 1" (study std1)
    v1: Variables "Dependent Variables 1"
    t1: Time "Time-Dependent Solver 1"
      tlist = range(0,1,30)
      rtol = 0.001
      atolglobalmethod = scaled
      atolglobal = 0.001
      maxstepbdf = 0.05[s]
      maxorder = 2
      minorder = 1
      estrat = exclude
      rhoinf = 0.75
      fc1: FullyCoupled
        linsolver = d1
        dtech = hnlin
        initstep = 1
        minstep = 1.0E-4
        rstep = 10
        useminsteprecovery = auto
        minsteprecovery = 0.75
        ntermauto = tol
        maxiter = 5
        ntolfact = 1
        niter = 1
        damp = 0.9
        jtech = once
        ntermconst = tol
        initsteph = 1.0E-4
        minsteph = 1.0E-8
      d1: Direct | linsolver = mumps; mumpsalloc = 1.2; errorchk = auto; rhob = 400

Datasets
  dset1: Solution | solution = sol1

Plots
  pg1: PlotGroup1D "Degree of Cure (ck)" | data = dset1
    lngr1: LineGraph "Versus Position" on domains 1 | expr = alpha